α := 45 deg = 0.785398
a := 1
b := 2
θ_p := acos(a/b) = 60 deg
ϕ_p := 0 deg = 0
Given
sin(θ)*sin(ϕ) == cos(α)*sin(ϕ_p)*sin(θ_p) - sin(α)*cos(θ_p)
cos(θ) == sin(α)*sin(θ_p)*sin(ϕ_p) + cos(θ_p)*cos(α)
Find(θ, ϕ) simplify → [-1.20942920289, -1.20942920289; 2.75399596693, 0.387596686655] = [-69.2952, -69.2952; 157.792, 22.2077] deg
θ := acos(cos(α)*cos(θ_p) + sin(α)*sin(ϕ_p)*sin(θ_p)) = 69.2952 deg
ϕ := -asin(1/sqrt(1 - (cos(α)*cos(θ_p) + sin(α)*sin(ϕ_p)*sin(θ_p))^2)*(sin(α)*cos(θ_p) - cos(α)*sin(ϕ_p)*sin(θ_p))) = -22.2077 deg
