α := 45 deg
θ_p := 30 deg
ϕ_p := 90 deg
# estimées initiales
θ := 45 deg
ϕ := 90 deg
Given
cos(α)*sin(θ)*cos(ϕ) - sin(α)*cos(θ) == sin(θ_p)*cos(ϕ_p)
sin(α)*sin(θ)*cos(ϕ) + cos(α)*cos(θ) == cos(θ_p)  # avec tes équations
Find(θ, ϕ) = [52.2388; 39.2315] deg
ϕ_p := 90 deg + ϕ_p = 180 deg
ϕ := acos(sin(α)*sin(θ_p)*sin(ϕ_p) + cos(α)*cos(θ_p)) = 52.2388 deg
θ := atan((cos(α)*sin(θ_p)*sin(ϕ_p) + sin(α)*cos(θ_p))/(sin(θ_p)*cos(ϕ_p))) + 90 deg = 39.2315 deg
