# https://math.stackexchange.com/questions/2268379/intersection-of-cylinder-and-plane/2507349
# Fibre de diamètre = 1 à θ = 0°
x(u, v) := v
y(u, v) := 1*cos(u)
z(u, v) := 1*sin(u)
# [component: inputs (x, y, z)]
# Rotation de la fibre d'un angle θ (ϕ = 0°)
# matrice de rotation
θ := 30 deg
# X_θ = R*X (rotation de la fibre d'un angle θ)
R := [cos(θ), -sin(θ), 0; sin(θ), cos(θ), 0; 0, 0, 1]
X_θ(u, v) := R*[x(u, v); y(u, v); z(u, v)]  # check
X_θ(1, 1) = [0.595874; 0.967916; 0.841471]
x_θ(u, v) := cos(θ)*v - sin(θ)*cos(u)
x_θ(1, 1) = 0.595874
y_θ(u, v) := sin(θ)*v + cos(θ)*cos(u)
y_θ(1, 1) = 0.967916
z_θ(u, v) := sin(u)
z_θ(1, 1) = 0.841471
# [component: inputs (x_θ, y_θ, z_θ)]
# Intersection de la fibre à angle θ avec le plan de coupe à angle α
# Explication
# Soit cos(θ) = A, sin(θ) = B et tan(α) = C
#
# Équation paramétrique de la fibre (cylindre) à angle θ
# x = A*v - B*cos(u) (1)
# y = B*v + A*cos(u) (2)
# z = sin(u) (3)
#
# Équation du plan à angle α
# x + C*z = 0 (4)
#
# de (4)
# A*v - B*cos(u) = -C*sin(u)
#
# v = (B *cos(u) - C*sin(u))/A (5)
#
# Si on remplace (5) dans (1) et (2), on a
#
# x = -C*sin(u) (6)
# y = B(B*cos(u)-C*sin(u))/A + A*cos(u) (7)
#
# Et on plot (3), (6) et (7).
α := 45 deg  # àà
x_θ(u, v) := -tan(α)*sin(u)
y_θ(u, v) := tan(θ)*(sin(θ)*cos(u) - tan(α)*sin(u)) + cos(θ)*cos(u)
z_θ(u, v) := sin(u)
α := 45 deg
# [component: inputs (x_θ, y_θ, z_θ)]
