ϕ_p := 10 deg = 0.174533
θ_p := 15 deg = 0.261799
α := 45 deg = 0.785398
# Équation qui est écrit dans l'article
θ := acos(cos(α)*cos(θ_p) + sin(α)*sin(ϕ_p)*sin(θ_p)) = 44.3738 deg
ϕ := asin((sin(α)*cos(θ_p) - cos(α)*sin(ϕ_p)*sin(θ_p))/sqrt(1 - (cos(α)*cos(θ_p) + sin(α)*sin(ϕ_p)*sin(θ_p))^2)) = 68.625 deg  # ne fonctionne pas
ϕ := atan((cos(α)*sin(θ_p)*sin(ϕ_p) - sin(α)*cos(θ_p))/(sin(θ_p)*cos(ϕ_p))) = -68.625 deg
# Vérification
U_p := [cos(θ_p); sin(θ_p)*cos(ϕ_p); sin(θ_p)*sin(ϕ_p)] = [0.965926; 0.254887; 0.0449435]
R_0 := [cos(α), 0, sin(α); 0, 1, 0; -sin(α), 0, cos(α)] = [0.707107, 0, 0.707107; 0, 1, 0; -0.707107, 0, 0.707107]
U := R_0*U_p = [0.714793; 0.254887; -0.651233]
θ := acos(U[0]) = 44.3738 deg
ϕ := atan2(U[1], U[2]) = -68.625 deg
